# Расчёт одноступенчатой ракеты с ЖРД
i := 1 .. 13
Топливо_table[i - 1] :=
    if mod(i, 2) == 1
        return "O2 + керосин"
    else
        return "АТ + НДМГ"
I_уд_П_table[i - 1] :=
    if mod(i, 2) == 1
        return 3250
    else
        return 3050
# Прямая задача
L_table[i - 1] := 500 + i*250
# Условия:
# Вариант
n := 9
M_ПГ_table[i - 1] := 300 + i*200
# [Excel component]
    excel["A2:A14"] := i
    excel["B2:B14"] := L_table
    excel["C2:C14"] := M_ПГ_table
    excel["D2:D14"] := Топливо_table
    excel["E2:E14"] := I_уд_П_table
get_input(n) :=
    L_max ← L_table[n - 1]
    M_ПГ ← M_ПГ_table[n - 1]
    Топливо ← Топливо_table[n - 1]
    I_удП ← I_уд_П_table[n - 1]
    return [L_max, M_ПГ, Топливо, I_удП]
[L_max, M_ПГ, Топливо, I_удП] := get_input(n)
# Дальность
L_max = 2750  # км
# Масса полезного груза
M_ПГ = 2100  # кг
Топливо = "O2 + керосин"
# Пустотный удельный импульс
I_удП = 3250  # м/с
# Радиус земли
R_з := 6371  # км
# 1) Баллистический расчёт
solve block
    # guess values
    A := 0
    B := 0
    C := 0
    # constraints
    A*4000^2 + B*4000 + C == 1.1
    2*A*4000 + B == 0
    A*400^2 + B*400 + C == 1.3
    # solver
    [A; B; C] := find(A, B, C) = [1.54321e-8; -0.000123457; 1.34691]
end solve block
# Определяем коэффициенты для записи уравнения К_д == К_д(L)
К_д(L) := A*L^2 + B*L + C
L := 400 .. 4000
# [plot: К_д(L) vs L]
К_д
L_max
К_д
# L, км
# Коэффициент дальности из графика:
К_д := К_д(L_max) = 1.12411
# Тогда из известного соотношения можно найти угол β
β := L_max/(К_д*2*R_з) = 0.191993
# рад
β = 11.0004°
# Определение угла бросания φ_A
# Его находим из графика
φ_A(β) := -1/2*(β - π/2)
b := 0 .. π
# [plot: φ_A(b) vs b]
# φ_A, рад
π/4
# β, рад
# 0 | π/2
φ_A := φ_A(β) = 0.689402  # рад
φ_A = 39.4998°
# Значит теперь можно перейти к определению безразмерной скорости ν_A
# Её можно найти из известной формулы по учебнику Феодосьева В.И. стр 328
tg(β) == ν_A*tg(φ_A)/(1 - ν_A + tg(φ_A)^2)
tg(x) := tan(x)
# Откуда:
ν_A := tg(β)*(1 + tg(φ_A)^2)/(tg(φ_A) + tg(β)) = 0.320479
# Также известно, что конечная скорость V_A вычисляется по формуле
V_A == V_круг(r_A)*sqrt(ν_A)  # , где
V_круг(r_A) == sqrt(μ/r_A)  # - скорость на круговой орбите радиусом r_A
# где μ := 3.986*10^5км^3/с^2 гравитационный параметр Земли
# а r_A == R_з + h_A, причём h_A находим из графика
solve block
    # guess values
    A := 0
    B := 0
    C := 0
    # constraints
    A*500^2 + B*500 + C == 50
    A*4000^2 + B*4000 + C == 150
    2*A*4000 + B == 0
    # solver
    [A; B; C] := find(A, B, C) = [-8.16327e-6; 0.0653061; 19.3878]
end solve block
# Определяем коэффициенты для записи уравнения h_A == h_A(L)
# а r_A == R_з + h_A, причём h_A находим из графика
h_A(L) := A*L^2 + B*L + C
L := 500 .. 4000
# [plot: h_A(L) vs L]
h_A
h_A
L_max
# L, км
h_A := h_A(L_max) = 137.245  # км
# Тогда:
r_A := R_з + h_A = 6508.24  # км
V_круг(r) := sqrt(μ/r)
V_круг(r_A) = 7.82594  # км/c
# Тогда конечная скорость в первом приближении:
V_A := V_круг(r_A)*sqrt(ν_A) = 4.43033  # км/c
# 2-ое приближение
# - уточним угол бросания, то есть найдем φ_A_opt, который находим из формулы:
tg(φ_A_opt) == sqrt(ν_A/2*(2*R_з - (r_A + R_з)*ν_A)/(R_з*ν_A + 2*(r_A - R_з)))
arctg(x) := atan(x)
φ_A_opt := arctg(sqrt(ν_A/2*(2*R_з - (r_A + R_з)*ν_A)/(R_з*ν_A + 2*(r_A - R_з)))) = 0.65742  # рад
φ_A_opt = 37.6674°
φ_A = 0.689402  # рад
φ_A = 39.4998°
φ_A := φ_A_opt
# Тогда тепрь можно уточнить безразмерную скорость из уравнения:
tg(β) == ν_A*tg(φ_A)/(1 - ν_A + tg(φ_A)^2)
# было ν_A = 0.320479
# стало: ν_A := tg(β)*(1 + tg(φ_A)^2)/(tg(φ_A) + tg(β)) = 0.32103
# Теперь окончательно конечная скорость во втором приближении:
# было: V_A = 4.43033км/c
# стало: V_A := V_круг(r_A)*sqrt(ν_A) = 4.43414км/c
# Завершается баллистический расчёт вычислением идеальной или характеристической скорости, которую вычисляют через уравнение
# V_х == V_A + sum(ΔV_i, i), где
# sum(ΔV_i, i) - потери характерестической скорости, причём статистически sum(ΔV_i, i)≈0.25*V_A
# Тогда:
# V_х := 1.25*V_A = 5.54268км/c
# 2) Массовый расчёт
# Для первого приближения нужно получить стартовую массу, задав весовые коэффициенты: μ_k, a_ТО, γ_ДУ, μ_Σ, ν_0
# Найдем относительную конечную массу
V_х == -I_удП*ln(μ_k)
μ_k := exp(-V_х*1000/I_удП) = 0.181693
# [Excel component]
    tab := excel["A2:C5"]
get_a_ТО(Топливо) :=
    for i ∈ (0 .. rows(tab))
        if tab[i, 0] == Топливо
            return tab[i, 2]
Топливо = "O2 + керосин"
a_ТО := get_a_ТО(Топливо) = 0.07
# Зададимся ν_0 := 0.5, что соответствует минимуму стартовой массы
lims_ДУ := 0.012, 0.013 .. 0.04  # - пределы изменения γ_ДУ
lims_Σ := 0.015, 0.016 .. 0.025  # - пределы изменения μ_Σ
get_start_koeffs(a_ТО, ν_0) :=
    M_0min ← 10^6
    koeffs_min ← [0, 0]
    for γ_ДУ ∈ lims_ДУ
        for μ_Σ ∈ lims_Σ
            M_0 ← M_ПГ*10^-3/(μ_k*(1 + a_ТО) - γ_ДУ/ν_0 - a_ТО - μ_Σ)
            if M_0 < M_0min
                M_0min ← M_0
                koeffs_min ← [γ_ДУ, μ_Σ]
    return koeffs_min
[γ_ДУ, μ_Σ] := get_start_koeffs(a_ТО, ν_0)
# Оптимальными значениями коэффициентов оказались:
a_ТО = 0.07
ν_0 = 0.5
γ_ДУ = 0.012
μ_Σ = 0.015
# В первом приближении получили стартовую массу
M_0 := M_ПГ*10^-3/(μ_k*(1 + a_ТО) - γ_ДУ/ν_0 - a_ТО - μ_Σ) = 24.587  # т  # м/с^2
g := 10
# Тогда стартовый вес
G_0 := M_0*g = 245.87  # кН
# Старотовая тяга
P_0 := G_0/ν_0 = 491.74  # кН
# Зададимся коэффициентом увеличения тяги а_э := 1.125 на отрезке [1,1 - 1,15]
# Найдем пустотную тягу:
P_п := а_э*P_0 = 553.207  # кН
# Найдем вес топлива
G_Т := G_0*(1 - μ_k) = 201.197  # кН
# Масса топлива
M_Т := G_Т/g = 20.1197  # т
# Весовые коэффициенты
Топливо = "O2 + керосин"
get_vesovie_koeffs(Топливо, M_Т, P_п) :=
    if Топливо == "АТ + НДМГ"
        a_ТО ← 0.033*(1 + 0.5*exp(-0.014*M_Т))
        γ_ДУ ← 0.012*(1 + 1.0*exp(-0.0009*P_п))
    else if Топливо == "O2 + CH4"
        a_ТО ← 0.046*(1 + 0.45*exp(-0.02*M_Т))
        γ_ДУ ← 0.012*(1 + 1.0*exp(-0.00095*P_п))
    else if Топливо == "O2 + керосин"
        a_ТО ← 0.041*(1 + 0.52*exp(-0.015*M_Т))
        γ_ДУ ← 0.015*(1 + 1.0*exp(-0.00092*P_п))
    else if Топливо == "O2 + H2"
        a_ТО ← 0.097*(1 + 0.21*exp(-0.045*M_Т))
        γ_ДУ ← 0.025*(1 + 1.0*exp(-0.0021*P_п))
    return [a_ТО, γ_ДУ]
[a_ТО, γ_ДУ] := get_vesovie_koeffs(Топливо, M_Т, P_п)
a_ТО = 0.0567659
γ_ДУ = 0.0240169
# Для ракетного блока с приборным отсеком
μ_Σ := 0.013*(1 + 0.59*exp(-0.0048*M_0)) + 0.25/M_0 = 0.0299842
# Уточняем стартовый вес ракеты для 2-го приближения
# Вес полезного груза
G_ПГ := M_ПГ*g/10^3 = 21  # кН
# Стартовый вес
G_0 := G_ПГ/(μ_k*(1 + a_ТО) - γ_ДУ/ν_0 - a_ТО - μ_Σ) = 366.988  # кН
# Стартовая масса
M_0 := G_0/g = 36.6988  # т
# Стартовая тяга
P_0 := G_0/ν_0 = 733.975  # кН
# коэффициентом увеличения тяги оставим прежним а_э = 1.125
# Тяга пустотная
P_п := а_э*P_0 = 825.722  # кН
# Найдем вес топлива
G_Т := G_0*(1 - μ_k) = 300.309  # кН
# Масса топлива
M_Т := G_Т/g = 30.0309  # т
# Весовые коэффициенты
Топливо = "O2 + керосин"
[a_ТО, γ_ДУ] := get_vesovie_koeffs(Топливо, M_Т, P_п)
a_ТО = 0.0545879
γ_ДУ = 0.0220174
# Для ракетного блока с приборным отсеком
μ_Σ := 0.013*(1 + 0.59*exp(-0.0048*M_0)) + 0.25/M_0 = 0.0262434
# В результате
G_0 = 366.988  # кН
G_Т := G_0*(1 - μ_k) = 300.309  # кН
G_ДУ := γ_ДУ*P_0 = 16.1602  # кН
G_Σ := μ_Σ*G_0 = 9.63101  # кН
G_ПО := 1/2*G_Σ = 4.81551  # кН
G_ХО := 1/2*G_Σ = 4.81551  # кН
G_ТО := a_ТО*G_Т = 16.3932  # кН
# Найдем стехиометрическое соотношение компонентов топлива k_M из таблицы
# [Excel component]
    tab1 := excel["A2:C5"]
get_k_M(Топливо) :=
    for i ∈ (0 .. rows(tab1))
        if tab1[i, 0] == Топливо
            return tab1[i, 2]
Топливо = "O2 + керосин"
k_M := get_k_M(Топливо) = 3.1
# Вес горючего
G_Г := G_Т/(1 + k_M) = 73.246  # кН
# Вес окислителя
G_ОК := G_Г*k_M = 227.063  # кН
# Проверка
G_0 == G_ПГ + G_ДУ + G_ТО + G_Г + G_ОК + G_ПО + G_ХО
G_0 = 366.988  # кН  # Примерно похожи, если что можно попробовать поменять стартовую массу M_0 в 1-ом приближении
G_ПГ + G_ДУ + G_ТО + G_Г + G_ОК + G_ПО + G_ХО = 363.493  # кН
# Найдём весовое качество конструкции α_К ≥ 0.05. Обычно α_К~0.1
α_К := 1/(1 + a_ТО)*(a_ТО + γ_ДУ/ν_0 + μ_Σ) = 0.118403
# 3) Объёмно-габаритный расчёт
# Произвольно зададимся диаметром ракеты и будем варьировать его до момента выполнения условия l_р/D=6..12
# Зададимся диаметром ракеты в пределах 1..3.6 м
# Лучше принамать D из ряда нормальных чисел
R_a20 := [1, 1.1, 1.2, 1.4, 1.6, 1.8, 2.0, 2.2, 2.5, 2.8, 3.2, 3.6]
# Ну если не получится то пытаемся вставлять свои диаметры ненормальные
# Возьмём
D := 2
# м  и
r := D/2 = 1  # м
# 1) Головная часть
# В домашнем задании плотность гловной части ρ_ГЧ должна попасть в промежуток  500 - 1000 кг/м^3
# В первом приближении возьмём форму ГЧ в виде конуса
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# Радиус ракеты:
r = 1  # м
# Также примем массу головной части равной массе полезного груза
M_ГЧ := M_ПГ = 2100  # кг
angle := 25 .. 15  # - в каком промежутке изменяется β
tg(x) := tan(x)
get_β(x) :=
    for β ∈ angle
        l_ГЧ ← r/tg(β*1°)
        V_ГЧ ← 1/3*l_ГЧ*0.785*(2*r)^2
        ρ_ГЧ ← M_ГЧ/V_ГЧ
        if 500 ≤ ρ_ГЧ ≤ 1000
            return β*1°
    return "Не получается"
# Это для проверки, если функция не сработает
l_ГЧ := r/tg(25°) = 2.14451
V_ГЧ := 1/3*l_ГЧ*0.785*(2*r)^2 = 2.24458
ρ_ГЧ := M_ГЧ/V_ГЧ = 935.585
β := get_β(r) = 0.436332
# Если ответ "Не получается",
# то меняем D выше или форму ГЧ
# Зададимся углом β:
β = 25°
β = 0.436332  # рад
# Тогда длина Головной части будет
l_ГЧ := round(r/tg(β), 3) = 2.145  # м
l_ГЧ*10^3 = 2145  # мм
# Объём Головной Части:
V_ГЧ := 1/3*l_ГЧ*0.785*D^2 = 2.2451  # м^3
# Плотность головной части
# ρ_ГЧ := M_ГЧ/V_ГЧ = 935.37кг/м^3
# Попали в промежуток  500< ρ_ГЧ = 935.37<1000
# 2) Топливный отсек
# Найдем плотности компонетов топлива по таблице
# [Excel component]
    tab2 := excel["A3:C6"]
get_density(Топливо) :=
    for i ∈ (0 .. rows(tab2))
        if tab2[i, 0] == Топливо
            ρ_ОК ← tab2[i, 1]
            ρ_Г ← tab2[i, 2]
            return [ρ_ОК, ρ_Г]
Топливо = "O2 + керосин"
[ρ_ОК, ρ_Г] := get_density(Топливо)  # ρ_ОК = 1140кг/м^3  # ρ_Г = 850кг/м^3
# a)Бак окислителя
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# Объём окислителя  V_ОК := G_ОК*1000/(g*ρ_ОК) = 19.9178 м^3
# Объём бака окислителя
V_бакаОК := 1.1*V_ОК = 21.9096  # м^3
# Вылет днища бака обычно принимают 0.2 - 0.3 D
h := 0.2*D = 0.4  # м
h*10^3 = 400  # мм
# Радису днища  R := round((r^2 + h^2)/(2*h), 3) = 1.45м
R*10^3 = 1450  # мм
# Объём шарового сегмента в днище  V_шар := π*h^2/3*(3*R - h) = 0.661829м^3
# Длина цилиндрической части бака окислителя
l_цилОК := round((V_бакаОК - 2*V_шар)/(0.785*D^2), 3) = 6.556  # м
l_цилОК*10^3 = 6556  # мм
# Длина бака окислителя
l_бакаОК := round(l_цилОК + 2*h, 3) = 7.356  # м
l_бакаОК*10^3 = 7356  # мм
# б) Бак горючего
# Магистральная и тоннельные трубы
get_V_ОК(L) :=
    if L < 2000
        V_ОК ← 3
    else if 2000 ≤ L < 3000
        V_ОК ← 4
    else
        V_ОК ← 5
# Бак окислителя обычно ставят выше бака с горючим.
# Поэтому вверху будет стоять бак окислителя, а снизу - горючего
# Тогда в магистральной трубе, что в нижнем баке, будет течь окислитель.
# Скорость компонента в трубе будем брать в зависимости от дальности полёта ракеты
# V_ОК := get_V_ОК(L_max) = 4м/с
L_max = 2750  # км
# Массовый расход всей ракеты
m_расх := P_п*10^3/I_удП = 254.068  # кг/c
# Массовый расход окислителя
m_расхОК := m_расх*k_M/(1 + k_M) = 192.1  # кг/c
m_расхОК == V_ОК*ρ_ОК*S_маг
S_маг == 0.785*d_маг^2
S_маг := m_расхОК/(V_ОК*ρ_ОК) = 0.0421273  # м^2
d_маг := round(sqrt(S_маг/0.785), 3) = 0.232  # м
d_маг*10^3 = 232  # мм
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# Диаметр тоннельной трубы делают примерно на 50-80 мм больше магистральной
zazor := 68  # мм  # - чтобы d_тон было красивое число
d_тон := d_маг + zazor*10^-3 = 0.3  # м
d_тон*10^3 = 300  # мм
# Объём горючего  V_Г := G_Г*1000/(g*ρ_Г) = 8.61718 м^3
# Объём бака горючего
V_бакаГ := 1.1*V_Г = 9.4789  # м^3
# Вылет днища возьмём такой же как и у бака окислителя
h = 0.4  # м
h*10^3 = 400  # мм
# Радису днища  R := round((r^2 + h^2)/(2*h), 3) = 1.45м
R*10^3 = 1450  # мм
# Объём шарового сегмента в днище  V_шар := π*h^2/3*(3*R - h) = 0.661829м^3
# Длина цилиндрической части бака горючего
l_цилГ := round((V_бакаГ - 2*V_шар + 0.785*d_тон^2*2*h)/(0.785*(D^2 - d_тон^2)), 3) = 2.675  # м
l_цилГ*10^3 = 2675  # мм
# Длина бака горючего
l_бакаГ := round(l_цилГ + 2*h, 3) = 3.475  # м
l_бакаГ*10^3 = 3475  # мм
# в) Длина топливного отсека
# Зададим расстояние между баками равное четверти вылета днища баков
l_межбак := h/4 = 0.1  # м
l_межбак*10^3 = 100  # мм
# Также в длине всего топливного отсека мы не учитываем вылет днища переднего бака и вылет днища нижнего бака
l_ТО := round(l_бакаОК + l_бакаГ + l_межбак - 2*h, 3) = 10.131  # м
l_ТО*10^3 = 10131  # мм
# 3) Приборный отсек
# Расположен за ГЧ и перед топливным отсеком
M_Σ := G_Σ/g*10^3 = 963.101  # кг
# Масса приборно отсека
M_ПО := 1/2*M_Σ = 481.551  # кг
# Плотность ПО ρ_ПО должна быть в промежутке 250 - 400 кг/м^3
# Зададимся плотностью ПО ρ_ПО := 250кг/м^3
# В объёме приборного отсека мы также учитываем вылет днища h переднего бака
V_ПО := M_ПО/ρ_ПО = 1.9262  # м^3
# Но также
V_ПО == V_цилПО - V_шар == l_ПО*0.785*D^2 - V_шар
V_шар = 0.661829  # м^3
# Тогда длина приборного отсека
# длина ПО должна быть больше h - вылета днища бака
l_ПО := round((V_ПО + V_шар)/(0.785*D^2), 3) = 0.824  # м
l_ПО*10^3 = 824  # мм
h*10^3 = 400  # мм
# 4) Хвостовой отсек
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# Длина хвостового отсека зависит от длины сопла. Произведём начальный расчёт сопла
# Зададимся давлением в камере сгорания. Для обычного двигателя закрытой схемы оно равно:
p_К := 15  # МПа
# Давление на срезе сопла обычно составляет 0.07- 0.08 МПа
# Зададимся давлением в этом промежутке
p_a := 0.075  # МПа
# Пустотную тягу получили из массового расчёта
P_п = 825.722  # кН
# Расходный комплекс топлива найдем по таблице
# [Excel component]
    tab3 := excel["A2:B5"]
get_β_Т(Топливо) :=
    for i ∈ (0 .. rows(tab3))
        if tab2[i, 0] == Топливо
            return tab3[i, 1]
Топливо = "O2 + керосин"
# β_Т := get_β_Т(Топливо) = 1797м/с
# Тогда площадь критического сечения:
S_кр := (β_Т*P_п*10^3)/(p_К*10^6*I_удП) = 0.0304374  # м^2
# Радиус критического сечения
r_кр := round(sqrt(S_кр/π), 3) = 0.098  # м
r_кр*10^3 = 98  # мм
# Обычно выходное сечение сопла расчитывается по формуле
S_a == S_кр*[(n - 1)/2*(2/(n + 1))^((n + 1)/(n - 1))/((p_a/p_К)^(2/n) - (p_a/p_К)^((n + 1)/n))]^0.5
# Но так как у нас топливо "O2 + керосин" или "АТ + НДМГ", то есть n=1.2
# То вычислим по упрощённой формуле
S_a := S_кр*(0.4*p_К/p_a + 0.8) = 2.45934  # м^2
# Радиус выходного сечения сопла
r_a := round(sqrt(S_a/π), 3) = 0.885  # м
r_a*10^3 = 885  # мм
# Закритическая часть
# В 1-ом приближении возьмём коническую закритическую часть
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# Угол β_закр должен быть в промежутке 15*°-20*°
# Примем
β_закр := 20°
# Тогда длина закритической части сопла
l_закр.кон := round((r_a - r_кр)/tg(β_закр), 3) = 2.162  # м
l_закр.кон*10^3 = 2162  # мм
# Во 2-ом приближении закритическая часть сопла имеет более сложную форму
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# Причём теперь длина закритической части сопла становится равной
l_закр := round(0.8*l_закр.кон, 3) = 1.73  # м
l_закр*10^3 = 1730  # мм
# Зададимся углами β_1 ∈ (20*° - 30*°) и β_2 ∈ (5*° - 10*°)
β_1 := 30°
β_2 := 5°
# Докритическая часть
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# Радиус камеры сгорания в два раза больше радиуса критического сечения
r_кам := 2*r_кр = 0.196  # м
r_кам*10^3 = 196  # мм
# Длина камеры сгорания
l_кам := round(1.5*r_кам, 3) = 0.294  # м
l_кам*10^3 = 294  # мм
# Зададимся углом β_вх ∈ (40*° - 45*°)
β_вх := 45°
# Тогда длина докритической части сопла
l_докр := round(tg(β_вх)*(r_кам - r_кр), 3) = 0.098  # м
l_докр*10^3 = 98  # мм
# Тогда длина сопла
l_с := l_докр + l_закр = 1.828  # м
l_с*10^3 = 1828  # мм
# Тогда длина хвостового отсека
l_ХО := 2*l_с = 3.656  # м
l_ХО*10^3 = 3656  # мм
# 5) Длина всей ракеты и проверка
l_р := l_ГЧ + l_ПО + l_ТО + l_ХО = 16.756  # м
l_р*10^3 = 16756  # мм
# Относительное удлинение ракеты λ должно быть в промежутке 6-12
λ := l_р/D = 8.378
# Если не попали, то меняем диаметр ракеты D
# Обычно нужно уменьшить D, чтобы увеличить λ
# Расчёт закончен, ниже просто повторяем данные для построения профиля ракеты
# Диаметр и радиус ракеты
D*10^3 = 2000  # мм
r*10^3 = 1000  # мм
# Головная часть
# Длина головной части
l_ГЧ*10^3 = 2145  # мм
# Угол между образующей и осью ракеты
β = 25°
# Приборный отсек
# Длина приборного отсека
l_ПО*10^3 = 824  # мм
# Топливный отсек
# Длина топливного отсека
l_ТО*10^3 = 10131  # мм
# Вылет днищ баков
h*10^3 = 400  # мм
# Длина цилиндрической части бака окислителя
l_цилОК*10^3 = 6556  # мм
# Длина цилиндрической части бака горючего
l_цилГ*10^3 = 2675  # мм
# Диаметр магистральной трубы
d_маг*10^3 = 232  # мм
# Диаметр тоннельной трубы
d_тон*10^3 = 300  # мм
# Хвостовой отсек
# Длина хвостового отсека
l_ХО*10^3 = 3656  # мм
l_с == 1/2*l_ХО
# Длина сопла
l_с*10^3 = 1828  # мм
# Длина камеры сгорания
l_кам*10^3 = 294  # мм
# Радиус камеры сгорания
r_кам*10^3 = 196  # мм
# Длина докритической части сопла
l_докр*10^3 = 98  # мм
# Радиус критического сечения
r_кр*10^3 = 98  # мм
# Закритическа часть сопла
l_закр*10^3 = 1730
# мм
β_1 := 30°
β_2 := 5°
# Радиус выходного сечения
r_a*10^3 = 885  # мм
