# Расчёт двухступенчатой ракеты с ЖРД
i := 1 .. 13
Топливо_table[i - 1] :=
    if mod(i, 2) == 1
        return "O2 + керосин"
    else
        return "АТ + НДМГ"
I_уд_П_table[i - 1] :=
    if mod(i, 2) == 1
        return 3250
    else
        return 3050
# Прямая задача
L_table[i - 1] := 500 + i*250
# Условия:
# Вариант
n := 9
M_ПГ_table[i - 1] := 300 + i*200
# [Excel component]
    excel["A2:A14"] := i
    excel["B2:B14"] := L_table
    excel["C2:C14"] := M_ПГ_table
    excel["D2:D14"] := Топливо_table
    excel["E2:E14"] := I_уд_П_table
get_input(n) :=
    L_max ← L_table[n - 1]
    M_ПГ ← M_ПГ_table[n - 1]
    Топливо ← Топливо_table[n - 1]
    I_удП ← I_уд_П_table[n - 1]
    return [L_max, M_ПГ, Топливо, I_удП]
[L_max, M_ПГ, Топливо, I_удП1] := get_input(n)
# Дальность
L_max = 2750  # км
# Масса полезного груза
M_ПГ := M_ПГ*10^-3 = 2.1  # т
Топливо = "O2 + керосин"
# Пустотный удельный импульс 1-ая ступень:I_удП1 = 3250м/с
# Пустотный удельный импульс 2-ая ступень:I_удП2 := I_удП1 = 3250м/с
# Радиус земли
R_з := 6371  # км
# Ускорение свободно падения g := 9.806м/с^2
# Характеристическая скорость V_х_зад := 5.560км/с
# Весовые коэффициенты:
a_ТО1 := 0.057
ν_01 := 0.5
γ_ДУ1 := 0.024
μ_Σ1 := 0.030
# Хуйню до графика и график в дз вставлять не надо, це сделано чтобы уменьшить количество вычислений.
M_start(λ) :=
    μ_к1 ← 1/(1 + a_ТО1)*(λ + a_ТО1 + γ_ДУ1/ν_01 + μ_Σ1)
    μ_к2 ← exp(-V_х_зад*10^3/I_удП1)/μ_к1
    M_0 ← M_ПГ*10^3*(1 - μ_к1)/(λ*(μ_к2 - μ_к1 + λ - λ*μ_к2))
    return M_0
i := 0 .. 500
λ[i] := 0.1 + i/1000
M_01[i] := M_start(λ[i])
find_index_min(M) :=
    k_min ← 0
    for k ∈ (1 .. 500)
        if M[k] < M[k_min]
            k_min ← k
    return k_min
k_min := find_index_min(M_01) = 152
λ_opt := λ[k_min] = 0.252
M_01min := round(M_01[k_min]) = 20707
# Варьируя  на отрезке [0.1; 0.6] и используя уравнения (5), (3), (4), построим график зависимости  (рис 1) в 1-ом приближении.
# [plot: M_01 vs λ]
M_0
# λ_opt | M_0min
λ
# Примерная нахуй минимальная масса
M_0 := round(M_01min) = 20707  # кг
M_01min*10^-3 = 20.707  # т
M_01 := M_0
# Ща сука всё будем считать по другому:
# В качестве 1-го приближения, пусть весовые коэффициенты I-ой ступени равны весовым коэффициентам II-ой ступени
a_ТО2 := a_ТО1 = 0.057
ν_П2 := ν_01 = 0.5
γ_ДУ2 := γ_ДУ1 = 0.024
μ_Σ2 := μ_Σ1 = 0.03
# Характеристическая скорость V_х_зад = 5.56км/с
M_ПГ = 2.1  # т
M := M_01min = 20707  # кг
M := 20063
V_хар(λ, M_0) :=
    μ_к1 ← 1/(1 + a_ТО1)*(λ + a_ТО1 + γ_ДУ1/ν_01 + μ_Σ1)
    μ_к2 ← 1/(1 + a_ТО2)*(M_ПГ*10^3/(λ*M_0) + a_ТО2 + γ_ДУ2/ν_П2 + μ_Σ2)
    V_х ← -I_удП1*ln(μ_к1) - I_удП2*ln(μ_к2)
    return V_х*10^-3
i := 0 .. 500
λ[i] := 0.1 + i/1000
Find_min_M(λ, V_х_зад) :=
    M_0 ← M_01min
    while 1
        V ← V_хар(λ, M_0)
        V_max ← max(V)
        if V_max ≥ V_х_зад
            M_0 ← M_0 - 50
        else
            break
    while round(V_max, 3) < round(V_х_зад, 3)
        M_0 ← M_0 + 1
        V ← V_хар(λ, M_0)
        V_max ← max(V)
    return M_0
M_0 := Find_min_M(λ, V_х_зад) = 21247  # кг
V.хар := V_хар(λ, M_0)
find_index_opt(V.хар) :=
    index ← 0
    V_max ← max(V.хар)
    for k ∈ (1 .. 500)
        if V.хар[k] == V_max
            index ← k
    return index
index_opt := find_index_opt(V.хар) = 214
λ_opt := λ[index_opt] = 0.314
# [plot: V.хар vs λ]
V_х
V_х_зад
λ_opt
λ
# Оптимальное соотношение ступеней
λ_opt = 0.314
# Стартовая масса ракеты
M_01 := M_0 = 21247  # кг
# Стартовая масса II-ой ступени
M_02 := round(M_01*λ_opt) = 6672  # кг
μ_к1 := 1/(1 + a_ТО1)*(λ_opt + a_ТО1 + γ_ДУ1/ν_01 + μ_Σ1) = 0.424787
μ_к2 := 1/(1 + a_ТО2)*(M_ПГ*10^3/(λ_opt*M_0) + a_ТО2 + γ_ДУ2/ν_П2 + μ_Σ2) = 0.425515
# Весовые коэффициенты для I-ой ступени
M_01 := M_01*10^-3 = 21.247  # т
# Cтартовый вес
G_01 := M_01*g = 208.348  # кН
# Стартовая тяга
P_01 := G_01/ν_01 = 416.696  # кН
# Зададимся коэффициентом увеличения тяги а_э := 1.15 на отрезке [1,1 - 1,15]
# Найдем пустотную тягу:
P_п1 := а_э*P_01 = 479.201  # кН
# Найдем вес топлива
G_Т1 := G_01*(1 - μ_к1) = 119.844  # кН
# Масса топлива
M_Т1 := G_Т1/g = 12.2215  # т
# Весовые коэффициенты
Топливо = "O2 + керосин"
get_vesovie_koeffs(Топливо, M_Т, P_п) :=
    if Топливо == "АТ + НДМГ"
        a_ТО ← 0.033*(1 + 0.5*exp(-0.014*M_Т))
        γ_ДУ ← 0.012*(1 + 1.0*exp(-0.0009*P_п))
    else if Топливо == "O2 + CH4"
        a_ТО ← 0.046*(1 + 0.45*exp(-0.02*M_Т))
        γ_ДУ ← 0.012*(1 + 1.0*exp(-0.00095*P_п))
    else if Топливо == "O2 + керосин"
        a_ТО ← 0.041*(1 + 0.52*exp(-0.015*M_Т))
        γ_ДУ ← 0.015*(1 + 1.0*exp(-0.00092*P_п))
    else if Топливо == "O2 + H2"
        a_ТО ← 0.097*(1 + 0.21*exp(-0.045*M_Т))
        γ_ДУ ← 0.025*(1 + 1.0*exp(-0.0021*P_п))
    return [a_ТО, γ_ДУ]
[a_ТО1, γ_ДУ1] := get_vesovie_koeffs(Топливо, M_Т1, P_п1)
a_ТО1 = 0.0587489
γ_ДУ1 = 0.0246522
# На первой ступени нет приборного отсека, тогда
μ_Σ1 := 0.013*(1 + 0.59*exp(-0.0048*M_01)) = 0.0199263
# Весовые коэффициенты для II-ой ступени
M_02 := M_02*10^-3 = 6.672  # т
# Cтартовый вес
G_02 := M_02*g = 65.4256  # кН
# Стартовая тяга
P_02 := G_02/ν_П2 = 130.851  # кН
# Зададимся коэффициентом увеличения тяги а_э := 1.1 на отрезке [1,1 - 1,15]
# Найдем пустотную тягу:
P_п2 := а_э*P_02 = 143.936  # кН
# Найдем вес топлива
G_Т2 := G_02*(1 - μ_к2) = 37.5861  # кН
# Масса топлива
M_Т2 := G_Т2/g = 3.83297  # т
# Весовые коэффициенты
Топливо = "O2 + керосин"
get_vesovie_koeffs(Топливо, M_Т, P_п) :=
    if Топливо == "АТ + НДМГ"
        a_ТО ← 0.033*(1 + 0.5*exp(-0.014*M_Т))
        γ_ДУ ← 0.012*(1 + 1.0*exp(-0.0009*P_п))
    else if Топливо == "O2 + CH4"
        a_ТО ← 0.046*(1 + 0.45*exp(-0.02*M_Т))
        γ_ДУ ← 0.012*(1 + 1.0*exp(-0.00095*P_п))
    else if Топливо == "O2 + керосин"
        a_ТО ← 0.041*(1 + 0.52*exp(-0.015*M_Т))
        γ_ДУ ← 0.015*(1 + 1.0*exp(-0.00092*P_п))
    else if Топливо == "O2 + H2"
        a_ТО ← 0.097*(1 + 0.21*exp(-0.045*M_Т))
        γ_ДУ ← 0.025*(1 + 1.0*exp(-0.0021*P_п))
    return [a_ТО, γ_ДУ]
[a_ТО2, γ_ДУ2] := get_vesovie_koeffs(Топливо, M_Т2, P_п2)
a_ТО2 = 0.0611288
γ_ДУ2 = 0.0281396
# На II-ой ступени есть приборный отсек, тогда
μ_Σ2 := 0.013*(1 + 0.59*exp(-0.0048*M_02)) + 0.25/M_02 = 0.0578983
# Зная новые значения весовых коэффициентов, во II-ом приближении при помощи уравнений (1), (2), (3) снова построим график  (рис. 2)
M_01min := M_01*10^3 = 21247  # кг
V_хар(λ, M_0) :=
    μ_к1 ← 1/(1 + a_ТО1)*(λ + a_ТО1 + γ_ДУ1/ν_01 + μ_Σ1)
    μ_к2 ← 1/(1 + a_ТО2)*(M_ПГ*10^3/(λ*M_0) + a_ТО2 + γ_ДУ2/ν_П2 + μ_Σ2)
    V_х ← -I_удП1*ln(μ_к1) - I_удП2*ln(μ_к2)
    return V_х*10^-3
i := 0 .. 500
λ[i] := 0.1 + i/1000
Find_min_M(λ, V_х_зад) :=
    M_0 ← M_01min
    while 1
        V ← V_хар(λ, M_0)
        V_max ← max(V)
        if V_max ≥ V_х_зад
            M_0 ← M_0 - 50
        else
            break
    while round(V_max, 3) < round(V_х_зад, 3)
        M_0 ← M_0 + 1
        V ← V_хар(λ, M_0)
        V_max ← max(V)
    return M_0
M_0 := Find_min_M(λ, V_х_зад) = 23202  # кг
V.хар := V_хар(λ, M_0)
find_index_opt(V.хар) :=
    index ← 0
    V_max ← max(V.хар)
    for k ∈ (1 .. 500)
        if V.хар[k] == V_max
            index ← k
    return index
index_opt := find_index_opt(V.хар) = 157
λ_opt := λ[index_opt] = 0.257
# [plot: V.хар vs λ]
V_х
V_х_зад
λ_opt
λ
# Оптимальное соотношение ступеней
λ_opt = 0.257
# Стартовая масса ракеты
M_01 := M_0 = 23202  # кг
# Стартовая масса II-ой ступени
M_02 := round(M_01*λ_opt) = 5963  # кг
μ_к1 := 1/(1 + a_ТО1)*(λ_opt + a_ТО1 + γ_ДУ1/ν_01 + μ_Σ1) = 0.363617
μ_к2 := 1/(1 + a_ТО2)*(M_ПГ*10^3/(λ_opt*M_0) + a_ТО2 + γ_ДУ2/ν_П2 + μ_Σ2) = 0.497096
# Весовые коэффициенты 1-ой ступени:
a_ТО1 = 0.0587489
ν_01 = 0.5
γ_ДУ1 = 0.0246522
μ_Σ1 = 0.0199263
# Весовые коэффициенты 2-ой ступени:
a_ТО2 = 0.0611288
ν_П2 = 0.5
γ_ДУ2 = 0.0281396
μ_Σ2 = 0.0578983
# II-ая ступень
M_02 := M_02*10^-3 = 5.963  # т
# Вес полезного груза на второй ступени
G_ПГ2 := M_ПГ*g = 20.5926  # кН
# Cтартовый вес
G_02 := M_02*g = 58.4732  # кН
# Зададимся пустотной нагрузкой на тягу:
ν_П2 := 0.5
# Стартовая тяга
P_02 := G_02/ν_П2 = 116.946  # кН
# Зададимся коэффициентом увеличения тяги а_э := 1.1 на отрезке [1,1 - 1,15]
# Найдем пустотную тягу:
P_п2 := а_э*P_02 = 128.641  # кН
# Найдем вес топлива
G_Т2 := G_02*(1 - μ_к2) = 29.4064  # кН
# Масса топлива
M_Т2 := G_Т2/g = 2.99882  # т
# Найдем конечное соотношение компонентов топлива k_M из таблицы
# [Excel component]
    tab1 := excel["A2:C5"]
get_k_M(Топливо) :=
    for i ∈ (0 .. rows(tab1))
        if tab1[i, 0] == Топливо
            return tab1[i, 2]
Топливо = "O2 + керосин"
k_M := get_k_M(Топливо) = 3.1
# Вес горючего
G_Г2 := G_Т2/(1 + k_M) = 7.17229  # кН
# Вес окислителя
G_ОК2 := G_Г2*k_M = 22.2341  # кН
# Вес двигательной установки
G_ДУ2 := γ_ДУ2*P_02 = 3.29082  # кН
# Вес топливного отсека
G_ТО2 := a_ТО2*G_Т2 = 1.79758  # кН
# Вес всех оставшихся частей ракеты
G_Σ2 := μ_Σ2*G_02 = 3.3855  # кН
# Вес приборного отсека:
G_ПО2 := 1/2*G_Σ2 = 1.69275  # кН
# Вес хвостового отсека:
G_ХО2 := 1/2*G_Σ2 = 1.69275  # кН
# В результате
G_02 = 58.4732  # кН
G_ПГ2 = 20.5926  # кН
G_ДУ2 = 3.29082  # кН
G_ТО2 = 1.79758  # кН
G_Г2 = 7.17229  # кН
G_ОК2 = 22.2341  # кН
G_ПО2 = 1.69275  # кН
G_ХО2 = 1.69275  # кН
# Проверка
G_02 == G_ПГ2 + G_ДУ2 + G_ТО2 + G_Г2 + G_ОК2 + G_ПО2 + G_ХО2
G_02 = 58.4732  # кН
# Примерно похожи,
G_ПГ2 + G_ДУ2 + G_ТО2 + G_Г2 + G_ОК2 + G_ПО2 + G_ХО2 = 58.4729  # кН
# Найдём весовое качество конструкции α_К2 ≥ 0.05. Обычно α_К2~0.1
α_К2 := 1/(1 + a_ТО2)*(a_ТО2 + γ_ДУ2/ν_П2 + μ_Σ2) = 0.165207
# I-ая ступень
M_01 := M_01*10^-3 = 23.202  # т
# Вес полезного груза на I-ой ступени
G_ПГ1 := M_02*g = 58.4732  # кН
# Cтартовый вес
G_01 := M_01*g = 227.519  # кН
# Стартовая тяга
P_01 := G_01/ν_01 = 455.038  # кН
# Зададимся коэффициентом увеличения тяги а_э := 1.15 на отрезке [1,1 - 1,15]
# Найдем пустотную тягу:
P_п1 := а_э*P_01 = 523.293  # кН
# Найдем вес топлива
G_Т1 := G_01*(1 - μ_к1) = 144.789  # кН
# Масса топлива
M_Т1 := G_Т1/g = 14.7653  # т
# Найдем стехиометрическое соотношение компонентов топлива k_M из таблицы
# [Excel component]
    tab1 := excel["A2:C5"]
get_k_M(Топливо) :=
    for i ∈ (0 .. rows(tab1))
        if tab1[i, 0] == Топливо
            return tab1[i, 2]
Топливо = "O2 + керосин"
k_M := get_k_M(Топливо) = 3.1
# Вес горючего
G_Г1 := G_Т1/(1 + k_M) = 35.3144  # кН
# Вес окислителя
G_ОК1 := G_Г1*k_M = 109.475  # кН
# Вес двигательной установки
G_ДУ1 := γ_ДУ1*P_01 = 11.2177  # кН
# Вес топливного отсека
G_ТО1 := a_ТО1*G_Т1 = 8.50619  # кН
# Вес всех оставшихся частей ракеты
G_Σ1 := μ_Σ1*G_01 = 4.53362  # кН
# На первой ступени нет приборного отсека, тогда вес хвостового отсека:
G_ХО1 := G_Σ1 = 4.53362  # кН
# В результате
G_01 = 227.519  # кН
G_ПГ1 = 58.4732  # кН
G_ДУ1 = 11.2177  # кН
G_ТО1 = 8.50619  # кН
G_Г1 = 35.3144  # кН
G_ОК1 = 109.475  # кН
G_ХО1 = 4.53362  # кН
# Проверка
G_01 == G_ПГ1 + G_ДУ1 + G_ТО1 + G_Г1 + G_ОК1 + G_ХО1
G_01 = 227.519  # кН
# Примерно похожи,
G_ПГ1 + G_ДУ1 + G_ТО1 + G_Г1 + G_ОК1 + G_ХО1 = 227.52  # кН
# Найдём весовое качество конструкции α_К1 ≥ 0.05. Обычно α_К1~0.1
α_К1 := 1/(1 + a_ТО1)*(a_ТО1 + γ_ДУ1/ν_01 + μ_Σ1) = 0.120878
# Дальше сравниваем массу одноступенчатой ракеты с массой двух ступенчатой ракеты
# Масса двухступенчатой ракеты:
M_01 = 23.202  # т
