# ДЗ2 Проектирование КА
вар := 9
# [Excel component]
    tab1 := excel["A2:F13"]
    топлива := excel["F2:F5"]
get_tab1(вар) :=
    row ← вар - 1
    M_0 ← tab1[row, 1]
    r_н ← tab1[row, 2]
    r_к ← tab1[row, 3]
    Δi ← tab1[row, 4]*1°
    топливо ← tab1[row, 5]
    return [M_0, r_н, r_к, Δi, топливо]
[M_0, r_н, r_к, Δi, топливо] := get_tab1(вар)
# Стартовая масса:
M_0 = 17  # т
# Радиус начальной орбиты:
r_н = 6600  # км
# Радиус конечной орбиты:
r_к = 60000  # км
# Угол некомпланароности:
Δi = 36°
топливо = "O2+Керосин"
# Ускорение свободного падения
g := 9.803  # м/с^2
# Гравитационный параметр Земли
μ := 398600.4415  # км^3/с^2
# 1. Баллистический расчёт
# а) Находим оптимальные значения
i := 0 .. 1000
Δi_1[i] := i/1000*Δi
Δi_2[i] := Δi - Δi_1[i]
ΔV_1[i] := sqrt(μ/r_н)*sqrt((sqrt(2*r_к/(r_н + r_к)) - 1)^2 + nthroot(2*r_к/(r_н + r_к), 4)*sin(Δi_1[i]/2)^2)
ΔV_2[i] := sqrt(μ/r_к)*sqrt((sqrt(2*r_н/(r_н + r_к)) - 1)^2 + nthroot(2*r_н/(r_н + r_к), 4)*sin(Δi_2[i]/2)^2)
ΔV[i] := ΔV_1[i] + ΔV_2[i]
i_min :=
    k_min ← 0
    for k ∈ (1 .. 1000)
        if ΔV[k] ≤ ΔV[k_min]
            k_min ← k
    return k_min
    = 94
ΔV_min := ΔV[i_min] = 4.21905  # км/с
Δi_1_opt := Δi_1[i_min] = 3.384°
i_конечный :=
    if 2*i_min > 1000
        return 1000
    else
        return 2*i_min
j := 0 .. i_конечный
# [plot: ΔV[j] vs Δi_1[j] (°)]
# ΔV, км/с
ΔV_min
# Δi_1, град
Δi_1_opt = 3.384°
Δi_2_opt := Δi - Δi_1_opt = 32.616°
ΔV_1_opt := ΔV_1[i_min] = 2.67167  # км/с
ΔV_1 := ΔV_1_opt
ΔV_2_opt := ΔV_2[i_min] = 1.54738  # км/с
ΔV_2 := ΔV_2_opt
# б) Потери скорости
# 1-ое приближение
n_0_opt := 0.3
n_01 := n_0_opt
# Найдём тягу двигателя:
M_01 := M_0 = 17  # т
P := M_01*g*n_01 = 49.9953  # кН
# Получаем удельный импульс двигательной установки от вида топлива
# [Excel component]
    tab2 := excel["A2:B5"]
get_tab2(топливо) :=
    for j ∈ (0 .. 3)
        if tab2[j, 0] == топливо
            I_уд ← tab2[j, 1]
            return I_уд
I_уд := get_tab2(топливо) = 3.6  # км/с
I_уд*10^3 = 3600  # м/с
# Гравитационные потери:
ΔV_гр1 := 0.238*(I_уд*10^3)^(2/3)/n_01^2*(ΔV_1*10^3/sqrt(μ*(10^3)^3/(r_н*10^3)))^3*1/10^3 = 0.0252384  # км/с
# Характеристическая скорость:
V_х1 := (ΔV_1 + ΔV_гр1)*1.015 = 2.73736  # км/с
# Относительная конечная масса после 1-го импульса
μ_к1 := exp(-V_х1/I_уд) = 0.467489
# 2-ое приближение
# Скорректируем значение тяговооружённости для первого импульса:
get_vesovie_koeffs(Топливо, P_п) :=
    if Топливо == "АТ+НДМГ"
        γ_ДУ ← 0.021*(1 + 4.1*exp(-0.019*P_п))
    else if Топливо == "O2+Керосин"
        γ_ДУ ← 0.029*(1 + 4.1*exp(-0.02*P_п))
    else if Топливо == "O2+H2"
        γ_ДУ ← 0.049*(1 + 4.1*exp(-0.023*P_п))
    else if Топливо == "O2+СПГ(CH4)"
        γ_ДУ ← 0.032*(1 + 4.1*exp(-0.021*P_п))
    return γ_ДУ
# Весовой коэффициент ДУ:
топливо = "O2+Керосин"
γ_ДУ := get_vesovie_koeffs(топливо, P) = 0.072745
# тяговооружённость:
n_01 := (1/(2.29*(I_уд*10^3)^(1/3)*γ_ДУ)*μ_к1*(1.1*(ΔV_1/sqrt(μ/r_н))))^(1/3) = 0.410638
# Пересчитаем тягу двигателя:
M_01 := M_0 = 17  # т
P := M_01*g*n_01 = 68.4333  # кН
# Гравитационные потери:
ΔV_гр1 := 0.238*(I_уд*10^3)^(2/3)/n_01^2*(ΔV_1*10^3/sqrt(μ*(10^3)^3/(r_н*10^3)))^3*1/10^3 = 0.0134705  # км/с
# Характеристическая скорость:
V_х1 := (ΔV_1 + ΔV_гр1)*1.015 = 2.72542  # км/с
# Относительная конечная масса после 1-го импульса
μ_к1 := exp(-V_х1/I_уд) = 0.469043
# Найдём стартовую массу перед 2-м импульсом:
M_02 := M_01*μ_к1 = 7.97373  # т
# Тяговооружённость при втором импульсе
n_02 := P/(M_02*g) = 0.875481
# Гравитационные потери для 2-го импульса
ΔV_гр2 := 0.238*(I_уд*10^3)^(2/3)/n_02^2*(ΔV_2*10^3/sqrt(μ*(10^3)^3/(r_н*10^3)))^3*1/10^3 = 0.000575776  # км/с
# Находим характеристическую скорость для второго импульса, аналогично формуле (5):
V_х2 := (ΔV_2 + ΔV_гр2)*1.015 = 1.57118  # км/с
# Тогда относительная конечная масса:
μ_к2 := exp(-V_х2/I_уд) = 0.646335
# Тогда относительная конечная масса после двух импульсов:
μ_к := μ_к1*μ_к2 = 0.303159
# 2. Весовой расчёт
# "Стартовый" вес РБ
G_0 := M_0*g = 166.651  # кН
# Из предыдущего пункта тяга равна:
P := M_01*g*n_01 = 68.4333  # кН
# Найдем вес топлива
G_Т := G_0*(1 - μ_к) = 116.129  # кН
# Масса топлива
M_Т := G_Т/g = 11.8463  # т
топливо = "O2+Керосин"
get_vesovie_koeffs(Топливо, M_т, P_п) :=
    if Топливо == "АТ+НДМГ"
        a_то ← 0.043*(1 + 1.6*exp(-0.11*M_т))
        γ_ДУ ← 0.021*(1 + 4.1*exp(-0.019*P_п))
    else if Топливо == "O2+Керосин"
        a_то ← 0.054*(1 + 1.6*exp(-0.12*M_т))
        γ_ДУ ← 0.029*(1 + 4.1*exp(-0.02*P_п))
    else if Топливо == "O2+H2"
        a_то ← 0.105*(1 + 1.6*exp(-0.28*M_т))
        γ_ДУ ← 0.049*(1 + 4.1*exp(-0.023*P_п))
    else if Топливо == "O2+СПГ(CH4)"
        a_то ← 0.058*(1 + 1.6*exp(-0.15*M_т))
        γ_ДУ ← 0.032*(1 + 4.1*exp(-0.021*P_п))
    return [a_то, γ_ДУ]
[a_ТО, γ_ДУ] := get_vesovie_koeffs(топливо, M_Т, P)
a_ТО = 0.0748516
γ_ДУ = 0.0592537
# Найдём вес оставшейся части РБ:
μ_Σ := 0.016*(1 + 0.7*exp(-0.07*M_0)) + 0.2/M_0 = 0.031172
# Для относительной конечной массы полезного груза можно записать:
μ_ПГ := μ_к*(1 + a_ТО) - a_ТО - γ_ДУ*n_01 - μ_Σ = 0.195495
# Или масса полезного груза
M_ПГ := M_0*μ_ПГ = 3.32342  # т
# Вес полезного груза:
G_ПГ := M_ПГ*g = 32.5795  # кН
# Найдем стехиометрическое соотношение компонентов топлива k_M из таблицы
# [Excel component]
    tab1 := excel["A2:C5"]
get_k_M(Топливо) :=
    for i ∈ (0 .. rows(tab1))
        if tab1[i, 0] == Топливо
            return tab1[i, 2]
топливо = "O2+Керосин"
k_M := get_k_M(топливо) = 3.1
# Вес горючего
G_Г := G_Т/(1 + k_M) = 28.3242  # кН
# Вес окислителя
G_ОК := G_Г*k_M = 87.8051  # кН
# Вес двигательной установки
G_ДУ := γ_ДУ*P = 4.05492  # кН
# Вес топливного отсека
G_ТО := a_ТО*G_Т = 8.69247  # кН
# Вес всех оставшихся частей ракеты
G_Σ := μ_Σ*G_0 = 5.19484  # кН
# Вес приборного отсека:
G_ПО := 1/2*G_Σ = 2.59742  # кН
# Вес хвостового отсека:
G_ХО := 1/2*G_Σ = 2.59742  # кН
# В результате
G_0 = 166.651  # кН
G_ПГ = 32.5795  # кН
G_Г = 28.3242  # кН
G_ОК = 87.8051  # кН
G_ДУ = 4.05492  # кН
G_ТО = 8.69247  # кН
G_ПО = 2.59742  # кН
G_ХО = 2.59742  # кН
# Проверка
G_0 == G_ПГ + G_Г + G_ОК + G_ДУ + G_ТО + G_ПО + G_ХО
G_0 = 166.651  # кН  # Примерно похожи, если что можно попробовать поменять стартовую массу M_0 в 1-ом приближении
G_ПГ + G_Г + G_ОК + G_ДУ + G_ТО + G_ПО + G_ХО = 166.651  # кН
# Найдём весовое качество конструкции α_К ≥ 0.05. Обычно α_К~0.1
α_К := 1/(1 + a_ТО)*(a_ТО + γ_ДУ*n_01 + μ_Σ) = 0.121278
# 3. Объёмно-габаритный расчёт
# Весовой расчёт будет производиться упрощённо: ТО + ДУ.
# Так как у нас топливо = "O2+Керосин", то выберем простую схему по аналогии с РБ ДМ
# Диаметр берём из промежутка [3.0 .. 4.1] м
# Пусть выводить конструкцию массой M_0 = 17т (из условия ДЗ) будет Ангара-А5. различные варианты «Ангары» реализуются с помощью различного числа универсальных ракетных модулей (УРМ; УРМ-1 — для первой ступени, УРМ-2 — для второй и третьей); Диаметр УРМ-2 составляет 3,6 м. Примем этот диаметр за исходный. - У КАЖДЛГО СВОЯ РАКЕТА
# Возьмём
D := 3.6
# м  и
r := D/2 = 1.8  # м
# 1) Топливный отсек
# Найдем плотности компонентов топлива по таблице
# [Excel component]
    tab2 := excel["A3:C6"]
get_density(Топливо) :=
    for i ∈ (0 .. rows(tab2))
        if tab2[i, 0] == Топливо
            ρ_ОК ← tab2[i, 1]
            ρ_Г ← tab2[i, 2]
            return [ρ_ОК, ρ_Г]
топливо = "O2+Керосин"
[ρ_ОК, ρ_Г] := get_density(топливо)
# ρ_ОК = 1140кг/м^3 | ρ_Г = 850кг/м^3
# a)Бак окислителя
# Является подвесным и выполнен в форме шара
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# Объём окислителя  V_ОК := G_ОК*10^3/(g*ρ_ОК) = 7.85698 м^3
# Объём бака окислителя
V_бакаОК := 1.1*V_ОК = 8.64268  # м^3
# Найдём радиус бака окислителя из формулы объёма шара:
r_бакаОК := round(nthroot(V_бакаОК*3/(4*π), 3), 3) = 1.273  # м
# Зазор можно между стенками бака и корпуса использовать в качестве проверки: он должен быть больше 0. Итак зазор будет:
h := r - r_бакаОК = 0.527  # м > 0
h*10^3 = 527  # мм
# Проверка пройдена.
# Также зазор не должен быть слишком большим для оптимального использования пространства. Для простоты примем, что отношение этого зазора к радиусу корпуса не должно превышать 0.4. Найдём это отношение:
h/r = 0.292778  # < 0.4
# Вторая проверка пройдена
# Иначе можно было бы увеличить радиус бака окислителя.
# Найдём диаметр бака окислителя:
D_бакаОК := r_бакаОК*2 = 2.546  # м
D_бакаОК*10^3 = 2546  # мм
# По совместительству длина бака окислителя - это его диаметр:
l_бакаОК := D_бакаОК = 2.546  # м
l_бакаОК*10^3 = 2546  # мм
# б) Бак горючего
# Также является подвесным, но выполнен в виде тора:
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# Объём горючего  V_Г := G_Г*10^3/(g*ρ_Г) = 3.39923 м^3
# Объём бака горючего
V_бакаГ := 1.1*V_Г = 3.73915  # м^3
# Радиус бака горючего:
r_бакаГ := round(nthroot(V_бакаГ/(0.126*π^2), 3), 3) = 1.443  # м
r_бакаГ*10^3 = 1443  # мм
# Делаем проверки на зазор
h := r - r_бакаГ = 0.357  # м  > 0
h*10^3 = 357  # мм
# Первая проверка пройдена.
h/r = 0.198333  # < 0.4
# Вторая проверка пройдена
# Иначе можно было бы изменить радиус образующей окружности  бака горючего.
# Найдём диаметр бака горючего:
D_бакаГ := r_бакаГ*2 = 2.886  # м
D_бакаГ*10^3 = 2886  # мм
# Длиной такого торового бака будет диаметр образующей окружности:
l_бакаГ := round(0.6*r_бакаГ, 3) = 0.866  # м
l_бакаГ*10^3 = 866  # мм
# в) Длина топливного отсека
# Зададим расстояние между крайними точками баков десятой доли радиуса корпуса:
l_межбак := r/10 = 0.18  # м
l_межбак*10^3 = 180  # мм
# В итоге получаем полную длину топливного отсека:
l_ТО := round(l_бакаОК + l_бакаГ + l_межбак, 3) = 3.592
# м
l_ТО*10^3 = 3592  # мм
# 2) Хвостовой отсек
# Для упрощение предположим, что ДУ утоплена в пустое пространство объёма бака горючего на длину камеры сгорания, то есть длина сопла равна длине хвостового отсека:
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# Зададимся давлением в камере сгорания, возьмём примерно такое же как ив РБ ДМ:
p_К := 7  # МПа
68*g*10^4 = 6666040
# Давление на срезе сопла обычно составляет 0.07- 0.08 МПа
# Зададимся давлением в этом промежутке
p_a := 0.075  # МПа
# Тягу получили из массового расчёта
P = 68.4333  # кН
# Расходный комплекс топлива найдем по таблице
# [Excel component]
    tab3 := excel["A2:B5"]
get_β_Т(Топливо) :=
    for i ∈ (0 .. rows(tab3))
        if tab2[i, 0] == Топливо
            return tab3[i, 1]
топливо = "O2+Керосин"
# β_Т := get_β_Т(топливо) = 1797м/с
# Удельный импульс, также берём из пункта 1.б:
I_уд*10^3 = 3600  # м/c
# Тогда площадь критического сечения:
S_кр := (β_Т*P*10^3)/(p_К*10^6*I_уд*10^3) = 0.00487994  # м^2
# Радиус критического сечения
r_кр := round(sqrt(S_кр/π), 3) = 0.039  # м
r_кр*10^3 = 39  # мм
# Обычно выходное сечение сопла рассчитывается по формуле
S_a == S_кр*[(n - 1)/2*(2/(n + 1))^((n + 1)/(n - 1))/((p_a/p_К)^(2/n) - (p_a/p_К)^((n + 1)/n))]^0.5
# Пусть n=1.2, тогда формула превращается превращается:
# То вычислим по упрощённой формуле
S_a := S_кр*(0.4*p_К/p_a + 0.8) = 0.186088  # м^2
# Радиус выходного сечения сопла
r_a := round(sqrt(S_a/π), 3) = 0.243  # м
r_a*10^3 = 243  # мм
# Закритическая часть
tg(x) := tan(x)
# В 1-ом приближении возьмём коническую закритическую часть
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# Угол β_закр должен быть в промежутке 15*°-20*°
# Примем
β_закр := 20°
# Тогда длина закритической части сопла
l_закр.кон := round((r_a - r_кр)/tg(β_закр), 3) = 0.56  # м
l_закр.кон*10^3 = 560  # мм
# Во 2-ом приближении закритическая часть сопла имеет более сложную форму
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# Причём теперь длина закритической части сопла становится равной
l_закр := round(0.8*l_закр.кон, 3) = 0.448  # м
l_закр*10^3 = 448  # мм
# Зададимся углами β_1 ∈ (20*° - 30*°) и β_2 ∈ (5*° - 10*°)
β_1 := 30°
β_2 := 5°
# Докритическая часть
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# Радиус камеры сгорания в два раза больше радиуса критического сечения
r_кам := 2*r_кр = 0.078  # м
r_кам*10^3 = 78  # мм
# Длина камеры сгорания
l_кам := round(1.5*r_кам, 3) = 0.117  # м
l_кам*10^3 = 117  # мм
# Зададимся углом β_вх ∈ (40*° - 45*°)
β_вх := 45°
# Тогда длина докритической части сопла
l_докр := round(tg(β_вх)*(r_кам - r_кр), 3) = 0.039  # м
l_докр*10^3 = 39  # мм
# Тогда длина сопла
l_с := l_докр + l_закр = 0.487  # м
l_с*10^3 = 487  # мм
# Тогда длина хвостового отсека
l_ХО := l_с = 0.487  # м
l_ХО*10^3 = 487  # мм
# 3. Длина РБ
# В данной упрощённой компоновке, длина РБ это просто сумма топливного и хвостового отсеков:
l_РБ := l_ТО + l_ХО = 4.079  # м
l_РБ*10^3 = 4079  # мм
# Расчёт закончен дальше размеры для построения:
# Диаметр корпуса
D*10^3 = 3600  # мм
# Диаметр бака окислителя:
D_бакаОК*10^3 = 2546  # мм
# Расстояние между баками:
l_межбак*10^3 = 180  # мм
# Радиус бака горючего:
r_бакаГ*10^3 = 1443  # мм
# Длина бака горючего:
l_бакаГ*10^3 = 866  # мм
# Радиус камеры сгорания:
r_кам*10^3 = 78  # мм
# Длина камеры сгорания
l_кам*10^3 = 117  # мм
# Угол входа в крит. часть
β_вх := 45°
# Тогда длина докритической части сопла
l_докр*10^3 = 39  # мм
# Радиус критического сечения
r_кр*10^3 = 39  # мм
# Длина закритической части сопла:
l_закр*10^3 = 448  # мм
# Радиус выходного сечения сопла
r_a*10^3 = 243  # мм
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β_1 = 30°
β_2 = 5°
l_ТО*10^3 = 3592  # мм
l_бакаОК*10^3 = 2546  # мм
l_бакаГ*10^3 = 866  # мм
l_ХО*10^3 = 487  # мм
l_РБ*10^3 = 4079  # мм
