i := 0 .. 11
варианты[i] := i + 1
дальность[i] := 10 + i
высота[i] := 15 - i
скорость[i] := 2.0 - i*0.1
перегрузка[i] := 5.0 - i*0.25
# Проектирование КА. ДЗ №1
# [Excel component]
    excel["A2:A13"] := варианты
    excel["B2:B13"] := дальность
    excel["C2:C13"] := высота
    excel["D2:D13"] := скорость
    excel["E2:E13"] := перегрузка
    tab1 := excel["A2:E13"]
get_tab1(вар) :=
    row ← 0
    for i ∈ (1 .. rows(tab1) - 1)
        if tab1[i, 0] == вар
            row ← i
            break
    l ← tab1[row, 1]
    H ← tab1[row, 2]
    V ← tab1[row, 3]
    n_x ← tab1[row, 4]
    return [l, H, V, n_x]
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вариант := 9
[l, H, V, n_x] := get_tab1(вариант) = [18, 7, 1.2, 3]
# Параметры ракеты:
# Длина ракеты
l = 18  # м
# Длина конусной части
l_к := 0.3*l = 5.4  # м
# Диаметр ракеты
d := 0.1*l = 1.8  # м
# Координаты центра давления
x_D := 2/3*l_к = 3.6  # м
# Координата приложения тяги
x_ДУ := 0.8*l = 14.4  # м
# Координата рулей
x_р := l = 18  # м
# Средняя плотность ракеты ρ := 1000кг/м^3
# Параметры полёта:
# Высота
H = 7  # км
# Скорость ракеты V = 1.2км/с
# Коэффициент осевой перегрузки
n_x = 3
# Угол атаки
α := 0.1  # рад
# Согласно ГОСТ 4401-81 - https://docs.cntd.ru/document/1200009588
# Параметры атмосферы на высоте H = 7км:
# Температура воздуха
T := 242.7  # К
# Плотность воздуха ρ_атм := 0.590 кг/м^3
# Ускорение свободного падения g := 9.7851м/с^2
# Также нам понадобятся:
# Газовая постоянная R := 287.1Дж/(кг*К)
# Показатель адиабаты
k := 1.4
# Решение
# Определим скоростной напор воздуха
q := ρ_атм*(V*10^3)^2/2 = 424800  # Н/м^2
# Определим скорость звука
a := sqrt(k*R*T) = 312.331  # м/с
# Найдём число Маха:
M := V*10^3/a = 3.84207
# На основании полученного числа Маха определим коэффициент лобового сопротивления:
C_x :=
    if M < 0.8
        return 0.29
    else if 0.8 ≤ M ≤ 1.068
        return M - 0.51
    else
        0.091 + 0.5*M^-1
    = 0.221138  # Проверка(для своего варианта каждая своя)
0.091 + 0.5*M^-1 = 0.221138
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# Найдём осевую аэродинамическую силу:
X := q*π*d^2/4*C_x = 239047  # Н
X/(g*10^3) = 24.4297  # тс
# Для коэффициента осевой перегрузки справедливо:
n_x == (P - X)/(M_р*g)  # (1)
# Найдём массу ракеты
M_р := (1/3*π*d^2/4*l_к + π*d^2/4*(l - l_к))*ρ/10^3 = 36.6435  # т
# Из формулы (1) Найдём тягу двигателя
P := n_x*M_р*10^3*g + X = 1314729  # Н
P/(g*10^3) = 134.36  # тс
# 1. Строим эпюру m(x).  Известно, что площадь под графиком - это масса ракеты
l_к = 5.4  # м
l = 18  # м
M_р = 36.6435  # т
# m := M_р/(l - 0.5*l_к) = 2.395т/м
# 2. Строим эпюру q_x(x). Для неё есть формула:
# Причём вес ракеты даёт сжатие, то есть эпюра будет ‘смотреть’ вниз.
# Как и в предыдущем пункте, найдём её максимальное значение.
q_x := -n_x*g*m/g = -7.18501  # тс/м
# 3. Строим эпюру q_x_аэр(x).
# Данная эпюра имеет характерную форму, называемую как “Пол Стрелы”. Площадь под её графиком равна осевой аэродинамической силе,
q_аэр_max := -X/(g*10^3)/(0.4*l_к + 0.1*l) = -6.16911  # тс/м
# 4. Строим эпюру N(x). Для неё справедлива простая формула:
# Найдем характерный точки:
# Справедливо будет сказать, что эпюра начинается из нуля:
N_0 := 0
# В конце участка конуса:
q_x = -7.18501  # тс/м
q_аэр_max = -6.16911  # тс/м
N_l_к := 1/2*l_к*(q_x + q_аэр_max) = -36.0561  # тс
# В месте приложения тяги:
N_x_ДУ := N_l_к + (x_ДУ - l_к)*(q_x + 0.1*q_аэр_max) = -106.273  # тс
# Также в этом месте должен быть скачок в положительную сторону из-за приложенной тяги P/(g*10^3) = 134.36тс
N_x_ДУ_Δ := N_x_ДУ + P/(g*10^3) = 28.0869  # тс
# В конце ракеты
N_l := N_x_ДУ_Δ + (l - x_ДУ)*(q_x + 0.1*q_аэр_max) = 2.13163e-14
# Эпюра пришла в нуль, следовательно, расчёты проведены верно.
# Для построения эпюр моментов и поперечных сил в ракете, предварительно вычислим некоторые значения:
# Координаты центра масс ракеты
M_р = 36.6435  # т
m = 2.395  # т/м
# Центр масс конуса:
x_кон_C := 2/3*l_к = 3.6  # м
# Масса конуса
M_кон := 1/2*l_к*m = 6.46651  # т
# Центр масс цилиндра:
x_цил_C := l_к + (l - l_к)/2 = 11.7  # м
# Масса цилиндра
M_цил := (l - l_к)*m = 30.177  # т
x_C := (M_кон*x_кон_C + M_цил*x_цил_C)/M_р = 10.2706  # м
# В соответствии полученного в прошлом числа Маха M = 3.84207, найдём коэффициент нормального сопротивления
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C_y_α :=
    if 0 ≤ M ≤ 0.25
        return 2.8
    else if 0.25 ≤ M ≤ 1.1
        return 2.8 + 0.447*(M - 0.25)
    else if 1.1 ≤ M ≤ 1.6
        return 3.18 - 0.660*(M - 1.1)
    else if 1.6 ≤ M ≤ 3.6
        return 2.85 + 0.350*(M - 1.6)
    else
        3.55
    = 3.55
# Определим нормальную аэродинамическую силу
Y := q*π*d^2/4*C_y_α*α = 383749  # Н
Y/(g*10^3) = 39.2177  # тс
# Согласно условию балансировки  управляющая аэродинамическая сила:
Y_р := Y*(x_C - x_D)/(x_р - x_C) = 331181  # Н
Y_р/(g*10^3) = 33.8454  # тс
# Согласно второму условию балансировки , коэффициент нормальной перегрузки будет равен:
n_y := (Y_р + Y)/(M_р*10^3*g) = 1.99389
# Разделим цилиндрическую часть ракеты на 4 равных части и в центре каждого блока найдём вес по оси y.
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# Вес в центре давления:
G_1_y := 1/2*l_к*m*g*n_y/g = 12.8935  # тс
# Дальше найдём длину цилиндрической части ракеты:
l_цил := l - l_к = 12.6  # м
# Тогда длина одного блока:
l_б := l_цил/4 = 3.15  # м
G_б_y := l_б*m*g*n_y/g = 15.0424  # тс
G_2_y := G_б_y
G_3_y := G_б_y
G_4_y := G_б_y
G_5_y := G_б_y
# Координаты элементов представленных на рисунке 4:
x_1 := x_D = 3.6  # м
x_2 := l_к + 0.5*l_б = 6.975  # м
x_3 := x_2 + l_б = 10.125  # м
x_4 := x_3 + l_б = 13.275  # м
x_5 := x_4 + l_б = 16.425  # м
x_6 := l = 18  # м
# Проверка
G_1_y + G_2_y + G_3_y + G_4_y + G_5_y = 73.0632  # тс
(Y + Y_р)/(10^3*g) = 73.0632  # тс
# 5. Построим эпюры .
# В нулевой точке не приложено никах сил, следовательно, в этой точке поперечная сила тоже будет равна нулю Q_0 := 0 Также мы будем делать не линейную аппроксимацию, а ступенчатую.
Q_1 := Y/(10^3*g) - G_1_y = 26.3242  # тс
Q_2 := Q_1 - G_2_y = 11.2818  # тс
Q_3 := Q_2 - G_3_y = -3.7606  # тс
Q_4 := Q_3 - G_4_y = -18.803  # тс
Q_5 := Q_4 - G_5_y = -33.8454  # тс
Y_р/(10^3*g) = 33.8454
Q_5 = -33.8454  # тс
# 6. Строим эпюры M(x)
M_1 := Q_0*x_1 = 0  # тс*м
M_2 := M_1 + Q_1*(x_2 - x_1) = 88.8443  # тс*м
M_3 := M_2 + Q_2*(x_3 - x_2) = 124.382  # тс*м
M_4 := M_3 + Q_3*(x_4 - x_3) = 112.536  # тс*м
M_5 := M_4 + Q_4*(x_5 - x_4) = 53.3066  # тс*м
M_6 := M_5 + Q_5*(x_6 - x_5) = -9.23706e-14  # тс*м
# Профиль ракеты:
# [Excel component]
    excel["A1"] := 0
    excel["B1"] := 0
    excel["A2"] := round(l_к, 3)
    excel["B2"] := round(d/2, 3)
    excel["A3"] := round(l, 3)
    excel["B3"] := round(d/2, 3)
# Эпюра m(x)
m = 2.395  # т/м
# [Excel component]
    excel["A1"] := 0
    excel["B1"] := 0
    excel["A2"] := round(l_к, 3)
    excel["B2"] := round(m, 3)
    excel["A3"] := round(l, 3)
    excel["B3"] := round(m, 3)
# Эпюра q_x(x)
q_x = -7.18501  # тс/м
# [Excel component]
    excel["A1"] := 0
    excel["B1"] := 0
    excel["A2"] := round(l_к, 3)
    excel["B2"] := round(q_x, 3)
    excel["A3"] := round(l, 3)
    excel["B3"] := round(q_x, 3)
# Эпюра q_аэр_x(x)
q_аэр_max = -6.16911  # тс/м
0.1*q_аэр_max = -0.616911  # тс/м
# [Excel component]
    excel["A1"] := 0
    excel["B1"] := 0
    excel["A2"] := round(l_к, 3)
    excel["B2"] := round(q_аэр_max, 3)
    excel["A3"] := round(l_к, 3)
    excel["B3"] := round(0.1*q_аэр_max, 3)
    excel["A4"] := round(l, 3)
    excel["B4"] := round(0.1*q_аэр_max, 3)
N_l_к = -36.0561  # тс
N_x_ДУ = -106.273  # тс
N_x_ДУ_Δ = 28.0869  # тс
N(x)
# [Excel component]
    excel["A1"] := 0
    excel["B1"] := 0
    excel["A2"] := round(l_к, 3)
    excel["B2"] := round(N_l_к, 3)
    excel["A3"] := round(x_ДУ, 3)
    excel["B3"] := round(N_x_ДУ, 3)
    excel["A4"] := round(x_ДУ, 3)
    excel["B4"] := round(N_x_ДУ_Δ, 3)
    excel["A5"] := round(l, 3)
    excel["B5"] := round(N_l, 3)
N_l = 2.13163e-14  # тс
norm(XY) :=
    for i ∈ 0 .. rows(XY) - 1
        for j ∈ 0 .. cols(XY) - 1
            XY[i, j] ← round(XY[i, j], 3)
    return XY
Q_x_tab := norm([x_1, Q_1; x_2, Q_1; x_2, Q_2; x_3, Q_2; x_3, Q_3; x_4, Q_3; x_4, Q_4; x_5, Q_4; x_5, Q_5; l, Q_5]) = [
    3.6, 26.324;
    6.975, 26.324;
    6.975, 11.282;
    10.125, 11.282;
    10.125, -3.761;
    13.275, -3.761;
    13.275, -18.803;
    16.425, -18.803;
    16.425, -33.845;
    18, -33.845
]
Q(x)
# [Excel component]
    excel["A1:B10"] := Q_x_tab
M_x_tab := norm([x_1, M_1; x_2, M_2; x_3, M_3; x_4, M_4; x_5, M_5; l, M_6]) = [3.6, 0; 6.975, 88.844; 10.125, 124.382; 13.275, 112.536; 16.425, 53.307; 18, 0]
M(x)
# [Excel component]
    excel["A1:B6"] := M_x_tab
