# Баллистический расчёт ДМ-03 на ГСО
# Радиус Земли
R_З := 6371  # км
# Ускорение свободного падения
g := 9.803  # м/с^2
# Гравитационный параметр Земли
μ := 398600.4415  # км^3/с^2
# Радиус начальной орбиты:
r_н := R_З + 200 = 6571  # км
# Радиус рабочей орбиты (ГСО):
r_р := 42164  # км
# Угол некомпланароности:
Δi := 51.6°  # (между начальной и рабочей орбитой)
# Радиус орбиты захоронения
r_з := r_р + 200 = 42364  # км
топливо := "O2+Керосин"
# Масса топлива реальная
M_Тр := 18.7  # т
# Соотношение компонентов
k_M := 2.82
# Масса горючего:
M_Гр := M_Тр/(1 + k_M) = 4.89529  # т
# Масса окислителя:
M_ОКр := M_Гр*k_M = 13.8047  # т
# Сухая Масса РБ:
M_РБс := 3.245  # т
# Масса заправленного разгонного бока:
M_РБ := M_РБс + M_Тр = 21.945  # т
# Реальная Масса полезного груза
M_ПГр := 3.44  # т
# Стартовая масса на опорной орбите:
M_0 := M_РБ + M_ПГр = 25.385  # т
# Тяга ДУ:
P := 8.5*10^3*g*10^-3 = 83.3255  # кН
# Удельный импульс двигательной установки:
I_уд := 376*g = 3685.93  # м/с
# а) Находим оптимальные значения
i := 0 .. 1000
Δi_1[i] := i/1000*Δi
Δi_2[i] := Δi - Δi_1[i]
ΔV_1[i] := sqrt(μ/r_н)*sqrt((sqrt(2*r_р/(r_н + r_р)) - 1)^2 + nthroot(2*r_р/(r_н + r_р), 4)*sin(Δi_1[i]/2)^2)
ΔV_2[i] := sqrt(μ/r_р)*sqrt((sqrt(2*r_н/(r_н + r_р)) - 1)^2 + nthroot(2*r_н/(r_н + r_р), 4)*sin(Δi_2[i]/2)^2)
ΔV[i] := ΔV_1[i] + ΔV_2[i]
i_min :=
    k_min ← 0
    for k ∈ (1 .. 1000)
        if ΔV[k] ≤ ΔV[k_min]
            k_min ← k
    return k_min
    = 109
ΔV_min := ΔV[i_min] = 4.28595  # км/с
Δi_1_opt := Δi_1[i_min] = 5.6244°
i_конечный :=
    if 2*i_min > 1000
        return 1000
    else
        return 2*i_min
j := 0 .. i_конечный
# [plot: ΔV[j] vs Δi_1[j] (°)]
# ΔV, км/с
ΔV_min
# Δi_1, град
Δi_1_opt = 5.6244°
Δi_2_opt := Δi - Δi_1_opt = 45.9756°
ΔV_1_opt := ΔV_1[i_min] = 2.49052  # км/с
ΔV_1 := ΔV_1_opt
ΔV_2_opt := ΔV_2[i_min] = 1.79543  # км/с
ΔV_2 := ΔV_2_opt
# б) Потери скорости
# Найдём стартовую массу перед 2-м импульсом:
M_01 := M_0 = 25.385  # т
# Найдём тяговооружённость:
n_01 := P/(M_01*g) = 0.334843
# Зная удельный импульс двигательной установки
I_уд = 3685.93  # м/с
# Находим гравитационные потери:
ΔV_гр1 := 0.238*I_уд^(2/3)/n_01^2*(ΔV_1/sqrt(μ/r_н))^3*1/10^3 = 0.0165616  # км/с
# Характеристическая скорость:
V_х1 := (ΔV_1 + ΔV_гр1)*1.015 = 2.54469  # км/с
# Относительная конечная масса после 1-го импульса
μ_к1 := exp(-V_х1*10^3/I_уд) = 0.501386
# Найдём стартовую массу перед 2-м импульсом:
M_02 := M_01*μ_к1 = 12.7277  # т
# Тяговооружённость при втором импульсе
n_02 := P/(M_02*g) = 0.667836
# Гравитационные потери для 2-го импульса
ΔV_гр2 := 0  # км/с
# Находим характеристическую скорость для второго импульса, аналогично формуле (5):
V_х2 := (ΔV_2 + ΔV_гр2)*1.015 = 1.82236  # км/с
# Тогда относительная конечная масса:
μ_к2 := exp(-V_х2*10^3/I_уд) = 0.609931
# Маневр по уводу разгонного блока на орбиту захоронения:
# Скорость полёта на рабочей орбите:
v_р := round(sqrt(μ/r_р), 3) = 3.075  # км/с
# Скорость полёта на орбите захоронения:
v_з := round(sqrt(μ/r_з), 3) = 3.067  # км/с
# Большая полуось переходного эллипса на орбиту захоронения:
a_ПЭ := 0.5*(r_р + r_з) = 42264  # км
# Скорость в перигее орбиты перелёта (переходного эллипса):
v_ПЭπ := round(sqrt(μ*(2/r_р - 1/a_ПЭ)), 3) = 3.078  # км/с
# Скорость в апогее орбиты перелёта (переходного эллипса):
v_ПЭα := round(sqrt(μ*(2/r_з - 1/a_ПЭ)), 3) = 3.064  # км/с
# Импульс скорости, необходимый для перелёта на орбиту перелёта:
Δv_ПЭ := |v_р - v_ПЭπ| = 0.003  # км/с
# Импульс скорости, необходимый формирования орбиты захоронения:
Δv_ФЗ := |v_з - v_ПЭα| = 0.003  # км/с
# Суммарный импульс для перелёта на орбиту захоронения:
ΔV_3 := Δv_ПЭ + Δv_ФЗ = 0.006  # км/с
# Найдём стартовую массу перед 3-м импульсом:
M_03 := M_02*μ_к2 = 7.763  # т
# Тяговооружённость при 3-ем импульсе
n_03 := P/(M_03*g) = 1.09494
# Гравитационные потери для 3-го импульса
ΔV_гр3 := 0  # км/с
# Находим характеристическую скорость для второго импульса, аналогично формуле (5):
V_х3 := (ΔV_3 + ΔV_гр3)*1.015 = 0.00609  # км/с
# Тогда относительная конечная масса:
μ_к3 := exp(-V_х3*10^3/I_уд) = 0.998349
# Тогда относительная конечная масса после трёх импульсов:
μ_к := μ_к1*μ_к2*μ_к3 = 0.305306
# 2. Весовой расчёт
# "Стартовый" вес РБ
G_0 := M_0*g = 248.849  # кН
# Из предыдущего пункта тяга равна:
P = 83.3255  # кН
# Найдем вес топлива
G_Т := G_0*(1 - μ_к) = 172.874  # кН
# Теоритическая масса топлива
M_Т := G_Т/g = 17.6348  # т
# Реальная масса топлива:
M_Тр = 18.7  # т
# Запас топлива:
ΔM_Т := M_Тр - M_Т = 1.06519  # т
топливо = "O2+Керосин"
a_ТО := 0.054*(1 + 1.6*exp(-0.12*M_Т)) = 0.0644105
γ_ДУ := 0.029*(1 + 4.1*exp(-0.02*P)) = 0.0514608
# Найдём вес оставшейся части РБ:
μ_Σ := 0.016*(1 + 0.7*exp(-0.07*M_0)) + 0.2/M_0 = 0.0257732
# Для относительной конечной массы полезного груза можно записать:
μ_ПГ := μ_к*(1 + a_ТО) - a_ТО - γ_ДУ*n_01 - μ_Σ = 0.217556
# Или масса полезного груза
M_ПГр = 3.44  # т
M_ПГ := M_0*μ_ПГ = 5.52265  # т
# Запас по полезному грузу
ΔM_ПГ := M_ПГ - M_ПГр - ΔM_Т = 1.01746  # т
ΔM_Т = 1.06519  # т
ΔM_Т/M_Тр*100 = 5.6962  # %
ΔM_ПГ = 1.01746  # т
ΔM_ПГ/M_ПГр*100 = 29.5775  # %
